! Automatically generated by the Typhoon HIL TSE to OpenDSS converter.

new "CAPACITOR.CAP_675" Bus1="BUS_675.1.2.3" kv=4.16 kvar=600 phases=3
new "CAPACITOR.CAP_611" Bus1="BUS_611.3" kvar=100 phases=1 kv=2.4017771198288433
